// COMSOL Multiphysics 6.0.0.405 model "KSML1000rhoInit0.04.mph"
// Outline of the model tree
// Unit system: none

Parameters
  T = 5
  Drho = 0.1
  L = 1000
  dL = 0.001
  rhoInit = 0.04
  endExp = 10.0
  randNum = 89403

Functions
  rn1: Random

Geometry
  geom1 "Geometry 1" (1D, length unit m)
    i1: Interval | coord = {0, L}
    fin: Finalize "Form Union"

Physics
  g: GeneralFormPDE on all domains
    dependent variable u = {rho, c}
    ShapeProperty.order = 1
    Units.SourceTermQuantity = dimensionless
    gfeq1: GeneralFormPDE (default) | f = {0, rho - c}; Ga = {-Drho*rhox + T*rho*cx, -cx}; da = {1, 0, 0, 1}
    zflx1: ZeroFluxBoundary "Zero Flux 1" (default)
    init1: init "Initial Values 1" (default)
      c = rhoInit + 0.001*rn1(x)
      rho = rhoInit*(1 + 1.9*rn1(x))
      a = aInit*(1 + 1.9*rn1(x))

Mesh
  mesh1 "Mesh 1"
    size: MeshSizeDefault | hmax = dL; custom = on
    edg1: Edge on domains 1

Studies
  std1 "Study 1"
    param: Parametric "Parametric Sweep"
      pname = rhoInit
      plistarr = 89403, 35024, 2320, 14362, 45067, 52542, 8315, 32632
    time: Transient "Time Dependent" | tlist = 10^range(0,0.1,endExp); usertol = on

Solver configurations
  sol1 "Solution 1" (study std1)
    v1: Variables "Dependent Variables 1"
    t1: Time "Time-Dependent Solver 1"
      tlist = 10^range(0,0.1,endExp)
      atolglobalvaluemethod = manual
      atolglobal = 1E-6
      initialstepbdf = 1E-6
      dDef: Direct
      fc1: FullyCoupled | linsolver = dDef
  sol2 "Parametric Solutions 1" (study std1)

Datasets
  dset1: Solution | solution = sol2
  dset2: Solution | solution = sol1